# OpenSim document version 40000
InverseKinematicsTool:
  time_range: 0 31.49931
  report_marker_locations: true
  IKTaskSet:
    IKMarkerTask sternum: apply=true weight=1
    IKMarkerTask R.clavicle: apply=true weight=1
    IKMarkerTask R.Shoulder.M: apply=true weight=1
    IKMarkerTask R.Elbow.Lateral: apply=true weight=1
    IKMarkerTask R.Wrist.Lateral.Thumb: apply=true weight=1
    IKMarkerTask R.Elbow.Medial.Inner: apply=true weight=1
    IKMarkerTask R.Wrist.Medial.pinky: apply=true weight=1
    IKMarkerTask TIP5: apply=true weight=1
    IKMarkerTask DIP5: apply=true weight=1
    IKMarkerTask PIP5: apply=true weight=1
    IKMarkerTask MCP5: apply=true weight=1
    IKMarkerTask TIP4: apply=true weight=1
    IKMarkerTask DIP4: apply=true weight=1
    IKMarkerTask PIP4: apply=true weight=1
    IKMarkerTask MCP4: apply=true weight=1
    IKMarkerTask TIP3: apply=true weight=1
    IKMarkerTask DIP3: apply=true weight=1
    IKMarkerTask PIP3: apply=true weight=1
    IKMarkerTask MCP3: apply=true weight=1
    IKMarkerTask TIP2: apply=true weight=1
    IKMarkerTask DIP2: apply=true weight=1
    IKMarkerTask PIP2: apply=true weight=1
    IKMarkerTask MCP2: apply=true weight=1
    IKMarkerTask TIP1: apply=true weight=1
    IKMarkerTask IP1: apply=true weight=1
    IKMarkerTask MCP1: apply=true weight=1
    IKMarkerTask CMC1: apply=true weight=1
    IKMarkerTask Wrist: apply=true weight=1
