# OpenSim document version 40000
ScaleTool Hand_Wrist_Model_scaled:
  mass: 4.778862 [kg]
  height: -1
  age: -1
  ModelScaler:
    apply: true
    scaling_order: measurements
    time_range: 0.5 1
    preserve_mass_distribution: true
    MeasurementSet:
      Measurement Humerus: apply=false
        MarkerPair: markers=(R.Elbow.Lateral R.Shoulder.M)
        MarkerPair: markers=(R.Elbow.Medial.Inner R.Shoulder.M)
      Measurement Ulna : apply=false
        MarkerPair: markers=(R.Wrist.Medial.pinky R.Elbow.Medial.Inner)
      Measurement radius: apply=false
        MarkerPair: markers=(R.Wrist.Lateral.Thumb R.Elbow.Lateral)
      Measurement palm: apply=false
        MarkerPair: markers=(Wrist CMC1)
        MarkerPair: markers=(Wrist MCP2)
        MarkerPair: markers=(Wrist MCP3)
        MarkerPair: markers=(Wrist MCP4)
        MarkerPair: markers=(Wrist MCP5)
  MarkerPlacer:
    apply: true
    time_range: 0.5 1
    max_marker_movement: -1
    IKTaskSet:
      IKMarkerTask sternum: apply=true weight=1
      IKMarkerTask R.clavicle: apply=true weight=1
      IKMarkerTask R.Shoulder.M: apply=true weight=1
      IKMarkerTask R.Elbow.Lateral: apply=true weight=1
      IKMarkerTask R.Wrist.Lateral.Thumb: apply=true weight=1
      IKMarkerTask R.Elbow.Medial.Inner: apply=true weight=1
      IKMarkerTask R.Wrist.Medial.pinky: apply=true weight=1
      IKMarkerTask TIP5: apply=true weight=1
      IKMarkerTask DIP5: apply=true weight=1
      IKMarkerTask PIP5: apply=true weight=1
      IKMarkerTask MCP5: apply=true weight=1
      IKMarkerTask TIP4: apply=true weight=1
      IKMarkerTask DIP4: apply=true weight=1
      IKMarkerTask PIP4: apply=true weight=1
      IKMarkerTask MCP4: apply=true weight=1
      IKMarkerTask TIP3: apply=true weight=1
      IKMarkerTask DIP3: apply=true weight=1
      IKMarkerTask PIP3: apply=true weight=1
      IKMarkerTask MCP3: apply=true weight=1
      IKMarkerTask TIP2: apply=true weight=1
      IKMarkerTask DIP2: apply=true weight=1
      IKMarkerTask PIP2: apply=true weight=1
      IKMarkerTask MCP2: apply=true weight=1
      IKMarkerTask TIP1: apply=true weight=1
      IKMarkerTask IP1: apply=true weight=1
      IKMarkerTask MCP1: apply=true weight=1
      IKMarkerTask CMC1: apply=true weight=1
      IKMarkerTask Wrist: apply=true weight=1
