# OpenSim document version 40000
MarkerSet:
  Marker R.Shoulder.M: scapula (0.007672717 -0.03335353 0.009668972)
  Marker R.Elbow.Lateral: humerus (0.00509 -0.28055 0.02884)
  Marker R.Wrist.Lateral.Thumb: radius (0.04565581 -0.2267234 0.01663369)
  Marker R.Elbow.Medial.Inner: humerus (-0.00407 -0.28442 -0.05408)
  Marker TIP5: 5distph (-0.005708081 -0.01507895 0.002628195)
  Marker DIP5: 5distph (0 0 0)
  Marker PIP5: 5midph (0 0 0)
  Marker MCP5: 5proxph (0 0 0)
  Marker TIP4: 4distph (-0.001165912 -0.01850126 0.002845363)
  Marker DIP4: 4distph (0 0 0)
  Marker PIP4: 4midph (0 0 0)
  Marker MCP4: 4proxph (0 0 0)
  Marker TIP3: 3distph (0.0001669367 -0.0173819 0.001516083)
  Marker DIP3: 3distph (0 0 0)
  Marker PIP3: 3midph (0 0 0)
  Marker MCP3: 3proxph (0 0 0)
  Marker TIP2: 2distph (0.002463994 -0.01713122 0.001278663)
  Marker DIP2: 2distph (0 0 0)
  Marker PIP2: 2midph (0 0 0)
  Marker MCP2: 2proxph (0 0 0)
  Marker TIP1: distal_thumb (0.01065704 -0.01770122 -0.007581638)
  Marker IP1: distal_thumb (0 0 0)
  Marker MCP1: proximal_thumb (0 0 0)
  Marker CMC1: firstmc (0 0 0)
  Marker Wrist: capitate (7.301773e-5 0.0006012044 0.005656858)
  Marker R.Wrist.Medial.pinky: radius (-0.006246817 -0.224581 0.01736937)
  Marker R.clavicle: clavicle (0.01835 -0.00464 -0.00046)
  Marker sternum: thorax (0.0486514 -0.09431006 3.340761e-10)
